OpenVSP model (file version 5), 5 components.
Geometry view with OpenVSP parameter names; values to 6 digits, angles in degrees, lengths in the model's unit.
Overall bounding box: X_Min=-0.00828427 X_Len=3.85828 Y_Min=-2.34423 Y_Len=4.68846 Z_Min=-0.12 Z_Len=0.592785

Fuselage "FuselageGeom"
  location (X Y Z) 0 0 0, rotation 0 0 0
  bounding box size 1.63828 0.3477 0.24
  Design: Length=1.63
  cross sections:
    n  XLocPercent  YLocPercent  ZLocPercent  shape
    0  0            0            0            circle Circle_Diameter=0.04
    1  0.258197     0            0            edit curve Width=0.3477 Height=0.24 AbsoluteFlag=0 SymType=0 linear points (X Y): 0.5 0, 0.5 -0.5, 0 -0.5, -0.5 -0.5, -0.5 0, -0.5 0.5, 0 0.5, 0.5 0.5, 0.5 0
    2  0.5          0            0            rounded rectangle RoundRectXSec_Radius=0.065 RoundedRect_Height=0.24 RoundedRect_Width=0.3477
    3  0.75         0            0            as above
    4  1            0            0            as above

Wing "WingGeom", child of "FuselageGeom"
  location (X Y Z) 0.95 0 0.035, rotation 0 5.45902 0
  symmetric about XZ
  bounding box size 0.655702 4.68846 0.118464
  totals: TotalSpan=4.68846 TotalProjectedSpan=4.68846 TotalChord=0.6586 TotalArea=3.08782 TotalAR=7.11883
  root: chord 0.6586, twist 0, NACA 4-series Camber=0.04 CamberLoc=0.4 ThickChord=0.15
  sections:
    n  Span     Root_Chord  Tip_Chord  Area     Sweep  Sweep_Location  Dihedral  Twist  Twist_Location  tip airfoil
    1  2.34423  0.6586      0.6586     1.54391  0      0               0         0      0.25            as above

Fuselage "boom"
  location (X Y Z) 1.27 -0.58 0.036, rotation 0 0 0
  symmetric about XZ
  bounding box size 2.2 1.21 0.05
  Design: Length=2.15
  cross sections:
    n  XLocPercent  YLocPercent  ZLocPercent  shape
    0  0            0            0            circle Circle_Diameter=0.05
    1  0.25         0            0            as above
    2  0.5          0            0            as above
    3  0.75         0            0            as above
    4  1            0            0            as above

Wing "tail"
  location (X Y Z) 3.05 0 0.44, rotation -35 0 0
  symmetric about XZ
  bounding box size 0.8 1.23368 0.481413
  totals: TotalSpan=1.45 TotalProjectedSpan=1.45 TotalChord=0.8 TotalArea=1.16 TotalAR=1.8125
  root: chord 0.8, twist 0, NACA 4-series Camber=0 CamberLoc=0.2 ThickChord=0.1
  sections:
    n  Span   Root_Chord  Tip_Chord  Area  Sweep  Sweep_Location  Dihedral  Twist  Twist_Location  tip airfoil
    1  0.725  0.8         0.8        0.58  0      0               0         0      0.25            as above

Mesh "MeshGeom"
  location (X Y Z) 0 0 0, rotation 0 0 0
  triangle mesh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

VSPAERO settings: Sref=3.08773 bref=4.68846 cref=0.65858 Xcg=0 Ycg=0 Zcg=0 AlphaStart=-5 AlphaEnd=8 AlphaNpts=14 BetaStart=0 BetaEnd=0 BetaNpts=1 MachStart=0.15 MachEnd=0 MachNpts=1 ReCref=1.63311e+07 Vinf=100 Rho=0.002377
