OpenVSP model (file version 5), 6 components.
Geometry view with OpenVSP parameter names; values to 6 digits, angles in degrees, lengths in the model's unit.
Overall bounding box: X_Min=-2.02255 X_Len=10.6025 Y_Min=-8.33872 Y_Len=16.6774 Z_Min=-0.669683 Z_Len=1.89968

Fuselage "FuselageGeom"
  location (X Y Z) -1.96721 0 0, rotation 0 0 0
  bounding box size 8.61067 1.33937 1.33937
  Design: Length=8.5
  cross sections:
    n  XLocPercent  YLocPercent  ZLocPercent  shape
    0  0            0            0            circle Circle_Diameter=0.26718
    1  0.354508     0            0            rounded rectangle RoundRectXSec_Radius=0.2 RoundedRect_Height=0.83 RoundedRect_Width=0.95
    2  0.560358     0            0            as above
    3  0.837837     0            0            as above
    4  1            0            0.02         circle Circle_Diameter=0.267176

Wing "WingGeom"
  location (X Y Z) 2.6 0 0.15, rotation 0 0 0
  symmetric about XZ
  bounding box size 1.29064 16.6774 0.200779
  totals: TotalSpan=16.6774 TotalProjectedSpan=16.6774 TotalChord=1.1275 TotalArea=17.2499 TotalAR=16.124
  root: chord 1.29, twist 0, NACA 4-series Camber=0.04 CamberLoc=0.4 ThickChord=0.15
  sections:
    n  Span     Root_Chord  Tip_Chord  Area     Sweep  Sweep_Location  Dihedral  Twist  Twist_Location  tip airfoil
    1  1.77872  1.29        1.29       2.29455  0      0               0         0      0.25            as above
    2  6.56     1.29        0.64       6.3304   0      0               0         0      0.25            as above

Fuselage "boom"
  location (X Y Z) 2.34 -1.61 0.175, rotation 0 0 0
  symmetric about XZ
  bounding box size 6.48 3.46 0.24
  Design: Length=6
  cross sections:
    n  XLocPercent  YLocPercent  ZLocPercent  shape
    0  0            0            0            circle Circle_Diameter=0.24
    1  0.25         0            0            as above
    2  0.5          0            0            as above
    3  0.75         0            0            as above
    4  1            0            0            as above

Wing "tail"
  location (X Y Z) 7.68 0 0.15, rotation 0 0 0
  symmetric about XZ
  bounding box size 0.810405 3.3 0.12607
  totals: TotalSpan=3.3 TotalProjectedSpan=3.3 TotalChord=0.81 TotalArea=2.673 TotalAR=4.07407
  root: chord 0.81, twist 0, NACA 4-series Camber=0.04 CamberLoc=0.4 ThickChord=0.15
  sections:
    n  Span  Root_Chord  Tip_Chord  Area    Sweep  Sweep_Location  Dihedral  Twist  Twist_Location  tip airfoil
    1  1.65  0.81        0.81       1.3365  0      0               0         0      0.25            as above

Wing "verticaltail"
  location (X Y Z) 7.64262 1.61 0.28, rotation 90 0 0
  symmetric about XZ
  bounding box size 0.847812 3.29295 0.95
  totals: TotalSpan=1.9 TotalProjectedSpan=1.9 TotalChord=0.62 TotalArea=1.178 TotalAR=3.06452
  root: chord 0.81, twist 0, NACA 4-series Camber=0 CamberLoc=0.1 ThickChord=0.09
  sections:
    n  Span  Root_Chord  Tip_Chord  Area   Sweep  Sweep_Location  Dihedral  Twist  Twist_Location  tip airfoil
    1  0.95  0.81        0.43       0.589  23.74  0               0         0      0               as above

Mesh "MeshGeom"
  location (X Y Z) 0 0 0, rotation 0 0 0
  triangle mesh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
