OpenVSP model (file version 5), 3 components.
Geometry view with OpenVSP parameter names; values to 6 digits, angles in degrees, lengths in the model's unit.
Overall bounding box: X_Min=-2.36102 X_Len=352.361 Y_Min=-126.006 Y_Len=252.011 Z_Min=-10019.8 Z_Len=20039.6

Fuselage "fuselage"
  location (X Y Z) 0 0 0, rotation 0 0 0
  bounding box size 352.361 42.5293 42.5293
  Design: Length=350
  cross sections:
    n  XLocPercent  YLocPercent  ZLocPercent  shape
    0  0            0            0            circle Circle_Diameter=11.4
    1  0.25         0            0            ellipse Ellipse_Height=31 Ellipse_Width=31
    2  0.5          0            0            circle Circle_Diameter=31
    3  0.75         0            0            as above
    4  1            0            0            point

Wing "wing", child of "fuselage"
  location (X Y Z) 119.288 0 0, rotation 0 0 0
  symmetric about XZ
  bounding box size 227 250 22.7132
  totals: TotalSpan=250 TotalProjectedSpan=250 TotalChord=135.5 TotalArea=33875 TotalAR=1.84502
  root: chord 227, twist 0, NACA 4-series Camber=0 CamberLoc=0.2 ThickChord=0.1
  sections:
    n  Span  Root_Chord  Tip_Chord  Area     Sweep  Sweep_Location  Dihedral  Twist  Twist_Location  tip airfoil
    1  125   227         44         16937.5  52.75  0.0964286       0         0      0.25            as above

Wing "tail"
  location (X Y Z) 302.408 123.829 9999, rotation 90 0 0
  symmetric about XY, XZ
  bounding box size 43.5 252.011 20039.6
  totals: TotalSpan=41.6 TotalProjectedSpan=41.6 TotalChord=38.65 TotalArea=1607.84 TotalAR=1.07633
  root: chord 43.5, twist 0, NACA 4-series Camber=0 CamberLoc=0.2 ThickChord=0.1
  sections:
    n  Span  Root_Chord  Tip_Chord  Area    Sweep  Sweep_Location  Dihedral  Twist  Twist_Location  tip airfoil
    1  20.8  43.5        33.8       803.92  0      0.975           0         0      0.25            as above

VSPAERO settings: Sref=3.39787 bref=2.5 cref=1.35915 Xcg=0 Ycg=0 Zcg=0 AlphaStart=-5 AlphaEnd=15 AlphaNpts=21 BetaStart=0 BetaEnd=0 BetaNpts=1 MachStart=0 MachEnd=0 MachNpts=1 ReCref=1e+07 Vinf=100 Rho=0.002377
